// COMSOL Multiphysics 5.6.0.280 model "Fluorescence - hzeq1 + hzeq2.mph"
// Outline of the model tree

Parameters
  mua_r = 0.14  // Absorption Coefficient
  musp_r = 10.8  // Reduced Scattering
  D_r = (1/3)*1/(musp_r+mua_r)  // Diffusion Coefficient
  A = 2.74  // Interface Absorption*
  mua_f1 = 0.95*(0.91192*exp(-0.5*((lambda-562[nm])/25.32906[nm])^2))  // Fluorescence Yield Fraction / Emission
  D_a = 2.00*10E-5  // Medium Diffusion Coefficient
  S = 5  // Excitation Light Intensity [W]
  mua_f2 = 4  // Absorption at peak absorption wavelength
  lambda_0 = 400[nm]  // Initial Wavelength
  lambda_f = 750[nm]  // Final Wavelength
  lambda_step = 1[nm]  // Parametric Sweep Step
  lambda = 400[nm]  // Wavelength (variable)
  em = -419770.21804+(2*1.77006E9/pi)*(53.21876/(4*(lambda-559.16796)^2+53.21876^2))  // emission coeficient
  abs = 6050.42819+(2*4.59358E6/pi)*(25.16275/(4*(lambda-527.90159)^2+25.16275^2))  // absorption coeficient
  emabs = 10643.11377+(-2.15167E6/(0.31747*sqrt(pi/2)))*exp(-2*((lambda*-590.93721)/0.31747[nm])^2)  // em/abs (test)
  em_norm = -0.02099 + (2*85.81541/pi)*(53.21944/(4*(lambda*10^13-559.1678)^2 + 53.21944^2))  // em normalizado
  em_delta = 10+99990*exp(-0.5*(lambda[1/nm]-(532*10E-9)/0.10391)^2)  // em_delta (ideia alexandre)
  em_delta_zero = 0.95*exp(-0.5*((lambda-532[nm])/0.0479[nm])^2)[1/m^2]  // em_delta baseline zero
  ab = abs_r(t)
  t = lambda

Functions
  int1: Interpolation "Emission" (disabled)
    funcname = em_r
    table = 
      {, }
      {490, 13148}
      {491, 14315}
      {492, 15015}
      {493, 16313}
      {494, 17564}
      {495, 19547}
      {496, 22274}
      {497, 25624}
      {498, 29420}
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    argunit = nm
  int2: Interpolation "Absorption"
    funcname = abs_r
    table = 
      {219.74, 33450}
      {219.99, 33507}
      {220.24, 33663}
      {220.49, 33985}
      {220.74, 33740}
      {220.99, 34158}
      {221.24, 33997}
      {221.49, 34083}
      {221.74, 34279}
      {221.99, 34442}
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    interp = neighbor
    argunit = nm
    fununit = 1/mol*cm

Variables
  var1 "Variables 1" (disabled)
    u_2 = mua_f1*u

Geometry
  geom1 "Geometry 1" (3D, length unit m)
    pt1: Point | p = {-0.05, 0, 0}
    blk1: Block | base = center; size = {0.1, 0.1, 0.1}
    blk2: Block | pos = {0, 0, 0.01}; base = center; size = {0.01, 0.01, 0.04}
    fin: Finalize "Form Union"

Materials
  mat1: Common "Air" (disabled) on all domains
    def "Basic"
      thermalexpansioncoefficient = alpha_p(pA,T)
      molarmass = 0.02897[kg/mol]
      bulkviscosity = muB(T)
      relpermeability = 1
      relpermittivity = 1
      dynamicviscosity = eta(T)
      ratioofspecificheat = 1.4
      electricconductivity = 0[S/m]
      heatcapacity = Cp(T)
      density = rho(pA,T)
      thermalconductivity = k(T)
      soundspeed = cs(T)
      eta: Piecewise | arg = T; pieces = {200.0, 1600.0, -8.38278E-7+8.35717342E-8*T^1-7.69429583E-11*T^2+4.6437266E-14*T^3-1.06585607E-17*T^4}; argunit = K; fununit = Pa*s
      Cp: Piecewise | arg = T; pieces = {200.0, 1600.0, 1047.63657-0.372589265*T^1+9.45304214E-4*T^2-6.02409443E-7*T^3+1.2858961E-10*T^4}; argunit = K; fununit = J/(kg*K)
      rho: Analytic | expr = pA*0.02897/R_const[K*mol/J]/T; args = {pA, T}; argunit = Pa,K; fununit = kg/m^3
      k: Piecewise | arg = T; pieces = {200.0, 1600.0, -0.00227583562+1.15480022E-4*T^1-7.90252856E-8*T^2+4.11702505E-11*T^3-7.43864331E-15*T^4}; argunit = K; fununit = W/(m*K)
      cs: Analytic | expr = sqrt(1.4*R_const[K*mol/J]/0.02897*T); args = T; argunit = K; fununit = m/s
      an1: Analytic | funcname = alpha_p; expr = -1/rho(pA,T)*d(rho(pA,T),T); args = {pA, T}; argunit = Pa,K; fununit = 1/K
      an2: Analytic "Analytic 2a" | funcname = muB; expr = 0.6*eta(T); args = T; argunit = K; fununit = Pa*s
    RefractiveIndex
      n = 1
      ki = 0
    NonlinearModel
      BA = (def.gamma+1)/2
    idealGas
      Rs = R_const/Mn
      heatcapacity = Cp(T)
      ratioofspecificheat = 1.4
      molarmass = 0.02897
      Cp: Piecewise | arg = T; pieces = {200.0, 1600.0, 1047.63657-0.372589265*T^1+9.45304214E-4*T^2-6.02409443E-7*T^3+1.2858961E-10*T^4}; argunit = K; fununit = J/(kg*K)

Physics
  hzeq: HelmholtzEquation on all domains
    dependent variable u
    ShapeProperty.order = 5
    heq1: HelmholtzEquation (default) | c = D_a; a = 1; f = 0
    zflx1: ZeroFluxBoundary "Zero Flux 1" (default)
    init1: init "Initial Values 1" (default) | u = 0
    heq2: HelmholtzEquation on all domains | c = D_r; a = mua_r
    flux1: FluxBoundary "Flux/Source 1" on boundaries 1-5, 12 | q = 1/(2*A)
    ptsrc1: PointSourceTerm "Point Source 1" on points 3 | f = S
  hzeq2: HelmholtzEquation on all domains
    dependent variable u2
    ShapeProperty.order = 5
    heq1: HelmholtzEquation (default) | c = D_r; a = mua_r; f = 0
    zflx1: ZeroFluxBoundary "Zero Flux 1" (default)
    init1: init "Initial Values 1" (default) | u2 = 0
    src1: SourceTerm "Source 1" on domains 2 | f = mua_f1*u
    flux1: FluxBoundary "Flux/Source 1" on boundaries 6-11 | q = 1/(2*A)

Mesh
  mesh1 "Mesh 1"
    size: MeshSizeDefault | hauto = 4
    ftet1: FreeTet "Free Tetrahedral 1" on domains 1
      size1: Size on points 3 | hmax = 0.002; hauto = 1
    ftet2: FreeTet "Free Tetrahedral 2" on domains 2
      size1: Size on all domains | hmax = 0.002; hauto = 1

Studies
  std1 "Study 1"
    param: Parametric "Parametric Sweep" | pname = lambda; plistarr = range(lambda_0,lambda_step,lambda_f); punit = m
    stat: Stationary | solve for = {hzeq}
    stat2: Stationary | solve for = {hzeq2}; initmethod = sol; initsol = current; notsol = current
    freq: Frequency "Frequency Domain" (disabled) | plist = c_const/lambda

Solver configurations
  sol1 "Solution 1" (study std1)
    v1: Variables "Dependent Variables 1"
    s1: Stationary "Stationary Solver 1"
      dDef: Direct
      fc1: FullyCoupled | linsolver = dDef
    su1: StoreSolution "Solution Store 1"
    v2: Variables "Dependent Variables 2" | initmethod = sol; notsolmethod = sol
    s2: Stationary "Stationary Solver 2"
      dDef: Direct
      fc1: FullyCoupled | linsolver = dDef
    su2: StoreSolution "Solution Store 2"
    v3: Variables "Dependent Variables 3" | initmethod = sol; notsolmethod = sol
  sol3 "Parametric Solutions 1" (study std1)
  sol151 "Solution Store 2" (study std1)
  sol2 "Solution Store 1" (study std1)

Datasets
  dset2: Solution (disabled) | solution = sol2
  dset1: Solution | solution = sol1
  dset3: Solution | solution = sol3
  cln1: CutLine3D | data = dset3; genpoints = {{0, 0, -0.05}, {0, 0, 0.05}}
  dset4: Solution | solution = sol151
  cln2: CutLine3D | data = dset1; genpoints = {{0, 0, -0.05}, {0, 0, 0.05}}
  cln3: CutLine3D | data = dset3; genpoints = {{0, 0, -0.05}, {0, 0, 0.05}}
  int2_ds1: Grid1D

Tables
  tbl1: Table
    X | Height
    508 | 0.389468
    510 | 0.459437
    512 | 0.538609
    514 | 0.627499
    516 | 0.726515
    518 | 0.835928
    520 | 0.95584
    522 | 1.08616
    524 | 1.22658
    526 | 1.37654
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  tbl2: Table
    X | Height
    508 | 0.389468
    510 | 0.459438
    512 | 0.538609
    514 | 0.627499
    516 | 0.726516
    518 | 0.835928
    520 | 0.95584
    522 | 1.08616
    524 | 1.22658
    526 | 1.37654
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  tbl3: Table
    X | Height
    508 | 0.389468
    510 | 0.459438
    512 | 0.538609
    514 | 0.627499
    516 | 0.726516
    518 | 0.835928
    520 | 0.95584
    522 | 1.08616
    524 | 1.22658
    526 | 1.37654
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  tbl4: Table
    X | Height
    508 | 0.389468
    510 | 0.459438
    512 | 0.538609
    514 | 0.627499
    516 | 0.726516
    518 | 0.835928
    520 | 0.95584
    522 | 1.08616
    524 | 1.22658
    526 | 1.37654
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  tbl5: Table
    X | Height
    690 | 1.07926e-05
    690 | 1.07927e-05
    690 | 1.07928e-05
    690 | 1.07929e-05
    690 | 1.0793e-05
    690 | 1.07931e-05
    690 | 1.07932e-05
    690 | 1.07933e-05
    690 | 1.07933e-05
    690 | 1.07934e-05
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  tbl6: Table
    X | Height
    508 | 0.389468
    509 | 0.423338
    510 | 0.459438
    511 | 0.497839
    512 | 0.538609
    513 | 0.581811
    514 | 0.627499
    515 | 0.675721
    516 | 0.726516
    517 | 0.779912
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
Plots
  pg1: PlotGroup3D "3D Plot Group 1" | data = dset1
    slc1: Slice (disabled) | expr = u
    mslc1: Multislice
      data = dset3
      expr = u
      xnumber = 2
      multiplaneymethod = coord
      ynumber = 2
      multiplanezmethod = coord
      znumber = 2
  pg2: PlotGroup3D "3D Plot Group 2" | data = dset3; title = Multislice: Dependent variable u2 (1)
    slc1: Slice (disabled) | expr = u2; quickxnumber = 3
    mslc1: Multislice | data = dset3; expr = u2
    mslc2: Multislice (disabled) | expr = u
  pg5: PlotGroup1D "1D Plot Group 5" | data = cln1; xlabel = Arc length (m); ylabel = Dependent variable u2 (1)
    lngr1: LineGraph | data = cln1; inputmode = linesecond; expr = u2
  pg9: PlotGroup1D "Fluence Rate X Wavelength" | data = dset3
    lngr1: LineGraph on edges 1-24 | data = dset3; expr = u2; xdata = expr; xdataexpr = lambda
    tblp1: Table "Table Graph 1" (disabled) | table = evl3; xaxisdata = auto; plotcolumninput = manual; plotcolumns = 1
    ptgr1: PointGraph on points 1-17 | data = dset3; expr = u2; xdata = expr; xdataexpr = lambda
  pg10: PlotGroup1D "1D Plot Group 10" | data = none
    tblp1: Table "Table Graph 1" | table = tbl1
  pg11: PlotGroup1D "1D Plot Group 11" | data = int2_ds1; title = abs_r(t) (1/mol*cm)
    plot1: Function | expr = abs_r(t[1/m][nm])

Exports
  plot1: Plot | filename = /home/randomlaser/Desktop/Untitled.txt