// COMSOL Multiphysics 5.6.0.280 model "Rh6G Scattering - Si Nanosphere 75nm.mph"
// Outline of the model tree

Parameters
  E0 = 10*0.91192*exp(-0.5*((lambda-562)/25.32906)^2)[V/m]  // campo elétrico
  radius1 = 75  // raio da nanopartícula
  r_pml1 = 10*radius1  // raio do pml
  t_pml1 = 3*radius1  // grossura do pml
  lambda = 562  // comprimento de onda
  lambda_min = 400  // lambda min
  lambda_max = 700  // lambda max
  lambda_step = 2  // variação de lambda
  sigma_geo1 = pi*(radius1[nm])^2  // secao de espalham.
  S_in = E0^2/(2*Z0_const)  // fator de escala

Variables
  var1 "Variables 1"
    sigma_sc1 = intop_surf1(nrelPoav1)/S_in  // seção de espalhamento
    nrelPoav1 = nx*emw.relPoavx+ ny*emw.relPoavy+ nz*emw.relPoavz
    sigma_abs1 = intop_vol1(emw.Qh)/S_in  // seção de absorçao
    sigma_ext = sigma_sc1+sigma_abs1  // seçao de extinçao
    nsigma_sc1 = intop_surf1(nrelPoav1)/S_in/sigma_geo1

Selections
  sel1: Explicit "Physical Domains1" on domains 5, 6
  com1: Complement "PML_Domains1" | entitydim = 3; input = {sel1}
  sel2: Explicit "Nanoparticle1" on domains 6
  sel3: Explicit "Nanoparticle Surface1" on boundaries 13-16, 24, 25, 30, 31
  sel4: Explicit "External PML Surface1" on boundaries 5-8, 20, 21, 28, 35
  sel5: Explicit "Internal PML Surface1" on boundaries 9-12, 22, 23, 29, 34

Couplings
  intop1: Integration on selection sel2 | opname = intop_vol1
  intop2: Integration on selection sel3 | opname = intop_surf1

Coordinate systems
  pml1: PML "Perfectly Matched Layer 1" on selection com1 | ScalingType = Spherical; PMLfactor = 0.5

Geometry
  geom1 "Geometry 1" (3D, length unit nm)
    sph1: Sphere "nanoparticle" | r = radius1
    sph2: Sphere "pml" | layername = Layer 1; layer = t_pml1; r = r_pml1
    fin: Finalize "Form Union"

Materials
  mat1: Common "Air" on all domains
    def "Basic"
      thermalexpansioncoefficient = alpha_p(pA,T)
      molarmass = 0.02897[kg/mol]
      bulkviscosity = muB(T)
      relpermeability = 1
      relpermittivity = 1
      dynamicviscosity = eta(T)
      ratioofspecificheat = 1.4
      electricconductivity = 0[S/m]
      heatcapacity = Cp(T)
      density = rho(pA,T)
      thermalconductivity = k(T)
      soundspeed = cs(T)
      eta: Piecewise | arg = T; pieces = {200.0, 1600.0, -8.38278E-7+8.35717342E-8*T^1-7.69429583E-11*T^2+4.6437266E-14*T^3-1.06585607E-17*T^4}; argunit = K; fununit = Pa*s
      Cp: Piecewise | arg = T; pieces = {200.0, 1600.0, 1047.63657-0.372589265*T^1+9.45304214E-4*T^2-6.02409443E-7*T^3+1.2858961E-10*T^4}; argunit = K; fununit = J/(kg*K)
      rho: Analytic | expr = pA*0.02897/R_const[K*mol/J]/T; args = {pA, T}; argunit = Pa,K; fununit = kg/m^3
      k: Piecewise | arg = T; pieces = {200.0, 1600.0, -0.00227583562+1.15480022E-4*T^1-7.90252856E-8*T^2+4.11702505E-11*T^3-7.43864331E-15*T^4}; argunit = K; fununit = W/(m*K)
      cs: Analytic | expr = sqrt(1.4*R_const[K*mol/J]/0.02897*T); args = T; argunit = K; fununit = m/s
      an1: Analytic | funcname = alpha_p; expr = -1/rho(pA,T)*d(rho(pA,T),T); args = {pA, T}; argunit = Pa,K; fununit = 1/K
      an2: Analytic "Analytic 2a" | funcname = muB; expr = 0.6*eta(T); args = T; argunit = K; fununit = Pa*s
    RefractiveIndex
      n = 1
      ki = 0
    NonlinearModel
      BA = (def.gamma+1)/2
    idealGas
      Rs = R_const/Mn
      heatcapacity = Cp(T)
      ratioofspecificheat = 1.4
      molarmass = 0.02897
      Cp: Piecewise | arg = T; pieces = {200.0, 1600.0, 1047.63657-0.372589265*T^1+9.45304214E-4*T^2-6.02409443E-7*T^3+1.2858961E-10*T^4}; argunit = K; fununit = J/(kg*K)
  mat2: Common "SiO2" on selection sel2
    def "Basic"
      relpermittivity = 12.25
      relpermeability = 1
      electricconductivity = 0

Physics
  emw: ElectromagneticWavesFrequencyDomain on all domains
    dependent variable E = {Ex, Ey, Ez}
    BackgroundField.SolveFor = scatteredField
    BackgroundField.Eb = {E0*exp(-j*2*pi*z/(lambda[nm])), 0, 0}
    wee1: WaveEquationElectric (default) | DisplacementFieldModel = RelativePermittivity
    pec1: PerfectElectricConductor (default)
    init1: init "Initial Values 1" (default)
    sctr1: Scattering "Scattering Boundary Condition 1" on selection sel5

Mesh
  mesh1 "Mesh 1" (physics-controlled)
    size: MeshSizeDefault | hauto = 4

Studies
  std1 "Study 1"
    param: Parametric "Parametric Sweep" | pname = lambda; plistarr = range(lambda_min,lambda_step,lambda_max)
    freq: Frequency "Frequency Domain" | punit = Hz; plist = c_const/(lambda[nm])

Solver configurations
  sol1 "Solution 1" (study std1)
    v1: Variables "Dependent Variables 1"
    s1: Stationary "Stationary Solver 1"
      p1: Parametric | pname = freq; plistarr = c_const/(lambda[nm]); punit = Hz; pcontinuationmode = no
      fc1: FullyCoupled | linsolver = i1
      i1: Iterative "Suggested Iterative Solver (emw)" | linsolver = bicgstab
        mg1: Multigrid
  sol2 "Parametric Solutions 1" (study std1)

Datasets
  dset1: Solution | solution = sol1
  dset2: Solution | solution = sol2
  cpt2: CutPoint3D "Point 1 - ewd.normE test" | data = dset2; pointx = 150; pointy = 150; pointz = 150
  cpt3: CutPoint3D "Point 2" | data = dset2; pointx = 250; pointy = 250; pointz = 150
  cpt4: CutPoint3D "Point 3" | data = dset2; pointx = 400; pointy = 400; pointz = 150
  cpt5: CutPoint3D "Point 4" | data = dset2; pointx = 700; pointy = 700; pointz = 150

Derived values
  gev1: EvalGlobal "Global Evaluation 1" | data = dset2; table = tbl1; expr = sigma_sc1

Tables
  tbl1: Table "scattering cross section"
    // Global Evaluation 1
    lambda | freq (Hz) | seção de espalhamento (m^2)
    1000 | 2.99792e+14 | 2.2154e-13
    1005 | 2.98301e+14 | 2.09159e-13
    1010 | 2.96824e+14 | 1.98247e-13
    1015 | 2.95362e+14 | 1.88586e-13
    1020 | 2.93914e+14 | 1.80024e-13
    1025 | 2.9248e+14 | 1.72458e-13
    1030 | 2.91061e+14 | 1.65827e-13
    1035 | 2.89655e+14 | 1.60106e-13
    1040 | 2.88262e+14 | 1.55297e-13
    1045 | 2.86883e+14 | 1.51428e-13
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  tbl2: Table "E0 x lambda"
    X | Height
    400 | 1.19463e-08
    406 | 5.28478e-08
    412 | 2.2103e-07
    418 | 8.73992e-07
    424 | 3.26733e-06
    430 | 1.15481e-05
    436 | 3.85884e-05
    442 | 0.000121908
    448 | 0.000364117
    454 | 0.0010282
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  tbl3: Table "ewd.normE x lambda (all edges)"
    X | Height
    670 | 4.03611e-09
    670 | 3.14769e-09
    670 | 1.99086e-09
    670 | 1.95848e-09
    670 | 2.32166e-09
    670 | 2.39034e-09
    670 | 3.51894e-10
    670 | 7.79492e-10
    670 | 1.34077e-09
    670 | 6.49668e-10
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  tbl4: Table "ewd.normE x lambda (point 1)"
    X | Height
    400 | 3.40611e-08
    406 | 4.10581e-08
    412 | 1.60375e-07
    418 | 8.31187e-07
    424 | 2.94862e-06
    430 | 1.02452e-05
    436 | 3.88205e-05
    442 | 0.000125191
    448 | 0.00059024
    454 | 0.00126892
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
Plots
  pg1: PlotGroup3D "Electric Field (emw)" | data = dset2
    mslc1: Multislice | data = dset2; expr = emw.normE
  pg3: PlotGroup1D "E0 x lambda" | data = dset2
    lngr1: LineGraph on all edges | expr = E0; xdata = expr; xdataexpr = lambda
  pg4: PlotGroup1D "ewd.normE x lambda" | data = cpt3; xlabel = Wavelength; ylabel = Electric field norm (V/m)
    lngr1: LineGraph (disabled) | expr = emw.normE; xdata = expr; xdataexpr = lambda
    ptgr1: PointGraph | expr = emw.normE; xdata = expr; xdataexpr = lambda